# DISTRIBUIÇÃO DE WEIBULL
# k ----  Fator de Forma
k := 1.88
# C ----  Fator de Escala (.m/s)
C := 8
f(u) := k/C*(u/C)^(k - 1)*e^(-(u/C)^k)
i := 0 .. 100
Δu := 30/100  # passo=Velocidade maxima/ numero de bins
u[i] := Δu*i  # m/s
# Frequencia Relativa
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# Velocidade do Vento m/s
# O fator de escala está relacionado com a velocidade média do vento no local por:
Γ(z) := integral(t^(z - 1)*e^(-t), t = 0 .. ∞)  # Função gamma
Γ(1 + 1/k) = 0.887678
U := C*Γ(1 + 1/k)
U = 7.10142  # m/s  # Velocidade média do vento no local
# Seja a Cuva de Potência da turbina a ser instalada no local dada por
p(v, cutin, nom, cutoff) :=
    0 if v < cutin
    ((-cos(π*(v - cutin)/(nom - cutin)) + 1)/2) if cutin < v ≤ nom
    1 if nom < v < cutoff
    0 otherwise
# Caracteristica de Saída da Turbina
# Potência x Velociade do Vento
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# Velocidade do Vento m/s
# Produção Anual de Energia
# Class Yield - Produção anual da turbina em cada uma das velocidades do vento é:
PT := 2.1  # Potenica da Turbina em MW
nha := 24*365  # Número de horas que a turbina opera por ano
CY(u) := PT*f(u)*p(u, 4, 13, 25)*nha
# Class Yield  MWh/ano
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# Velocidade do Vento m/s
# Total Yield -  Produção anual de energia
TY := sum(CY(u[i])*Δu, i)
TY = 6373.75  # MWh/ano
# Vamos considerar o preço de MWh de R$150,00
150*TY/1000 = 956.062  # mil reais por ano
