# Coeficiênte de Potência  Cp(λ,β)
# [1] Grid Integration of Wind Energy Conversion Systems , S. Heier
# λ  Tip speed ration -- Razao ente a velociade periférica da pá e a velociade do vento não perturbada.
# ω  é a velocidade do rotor no eixo de baixa em rad/s
# R raio da turbina  em metros
# v velocidade do vento up stream em m/s
#
# β é o angulo de ataque em (^o)
λ(ω, v) := ω*R/v
# Coefientes de ajunste da curva de potência
c1 := 0.5
c2(λ) := 80/λ
c3 := 0
c4 := 0.022
x := 1.5
c5 := 5.6
c6(λ) := 0.17*80/λ
cp(λ, β) := c1*(c2(λ) - c3*β - c4*β^x - c5)*e^(-c6(λ))
CP(λ, β) :=
    0 if cp(λ, β) < 0
    cp(λ, β) otherwise
i := 0 .. 1000
λ[i] := .01 + 16*i/1000
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